// COMSOL Multiphysics 5.4.0.388 model "FEAFrequencyAnalysis_wMPF_cross_platform.mph"
// Outline of the model tree
// Components: comp1 "Component 1", mcomp1 "Mesh Component 1"

Variables
  var1 "Variables 1" [comp1]

Common definitions
  mpf1: ParticipationFactors [comp1]

Geometry
  geom1 "Geometry 1" [comp1] (3D, length unit mm)
    imp1: Import
      meshentityindexmap = 
        {0, 1, 2, 3, 4, 5, 6, 7, 8, 9, 10, 11}
        {0, 1, 2, 3, 4, 5, 6, 7, 8, 9, 10, 11, 12, 13, 14, 15, 16, 17}
        {0, 1, 2, 3, 4, 5, 6, 7}
        {}
      type = cad
      filename = D:\datasets\TwistedBeamDS\10005\body.step
      mesh = mpart1
      fillholes = on
      removeredundant = on
    fin: Finalize "Form Union"
  mgeom1 "Mesh Geometry 1" [mcomp1] (3D, length unit mm)

Materials
  mat1: Common "Aluminum" [comp1] on all domains
    def "Basic"
      relpermeability = 1
      heatcapacity = 900[J/(kg*K)]
      thermalconductivity = 238[W/(m*K)]
      electricconductivity = 3.774e7[S/m]
      relpermittivity = 1
      thermalexpansioncoefficient = 23e-6[1/K]
      density = 2700[kg/m^3]
    Enu "Young's modulus and Poisson's ratio"
      youngsmodulus = 70e9[Pa]
      poissonsratio = 0.33
    Murnaghan
      l = -2.5e11[Pa]
      m = -3.3e11[Pa]
      n = -3.5e11[Pa]
    Lame "Lamé parameters"
      lambLame = 5.1e10[Pa]
      muLame = 2.6e10[Pa]

Physics
  solid: SolidMechanics [geom1] on all domains
    dependent variable u = {u, v, w}
    lemm1: LinearElasticModel "Linear Elastic Material 1" (default)
    free1: Free (default)
    init1: init "Initial Values 1" (default)
    fix1: Fixed "Fixed Constraint 1" on boundaries 2

Mesh
  mesh1 "Mesh 1" [geom1] (physics-controlled)
    size: MeshSizeDefault | hauto = 3
  mpart1 "Mesh Part 1" [mgeom1]
    imp1: Import | source = stlvrml; filename = C:\Users\Ron\Documents\Columbia\Altair\STL_Examples\beam_test.STL
    fin: Finalize

Studies
  std1 "Study 1"
    eig: Eigenfrequency | neigs = 3; shift = 100[Hz]; mesh = {geom1, mesh1}

Solver configurations
  sol1 "Solution 1" (study std1)
    v1: Variables "Dependent Variables 1"
    e1: Eigenvalue "Eigenvalue Solver 1"
      dDef: Direct

Datasets
  dset1: Solution | solution = sol1

Derived values
  gev1: EvalGlobal "Global Evaluation 1"
    data = dset1
    table = tbl1
    expr = {solid.freq, solid.Q_eig, solid.omega, solid.Wh_tot, numberofdofs, mpf1.mEffLX, mpf1.mEffLY, mpf1.mEffLZ, mpf1.mEffRX, mpf1.mEffRY, mpf1.mEffRZ, mpf1.pfLnormX, mpf1.pfLnormY, mpf1.pfLnormZ, mpf1.pfRnormX, mpf1.pfRnormY, mpf1.pfRnormZ}
    unit = {Hz, 1, rad/s, J, 1, kg, kg, kg, kg*m^2, kg*m^2, kg*m^2, 1, 1, 1, 1, 1, 1}
    descr = {Frequency, Quality factor for eigenvalue, Angular frequency, Total stored energy, Number of degrees of freedom, "Effective modal mass, X-translation", "Effective modal mass, Y-translation", "Effective modal mass, Z-translation", "Effective modal mass, X-rotation", "Effective modal mass, Y-rotation", "Effective modal mass, Z-rotation", "Participation factor, normalized, X-translation", "Participation factor, normalized, Y-translation", "Participation factor, normalized, Z-translation", "Participation factor, normalized, X-rotation", "Participation factor, normalized, Y-rotation", "Participation factor, normalized, Z-rotation"}

Tables
  tbl1: Table
    // Global Evaluation 1 {gev1} (solid.freq, lambda, solid.Q_eig, solid.omega, solid.Wh_tot, numberofdofs)
    Eigenfrequency (Hz) | Frequency (Hz) | Quality factor for eigenvalue (1) | Angular frequency (rad/s) | Total stored energy (J) | Number of degrees of freedom (1) | Effective modal mass, X-translation (kg) | Effective modal mass, Y-translation (kg) | Effective modal mass, Z-translation (kg) | Effective modal mass, X-rotation (kg*m^2) | Effective modal mass, Y-rotation (kg*m^2) | Effective modal mass, Z-rotation (kg*m^2)
    187.41 | 187.41 | 2.65157e+18 | 1177.53 | 1.14519e+07 | 2463 | 6.31356 | 0.836168 | 3.97948e-05 | 0.0160135 | 0.12025 | 1.28523e-07
    195.146 | 195.146 | 2.76102e+18 | 1226.14 | 1.24222e+07 | 2463 | 0.842507 | 6.3133 | 4.25743e-06 | 0.12038 | 0.0159075 | 8.06248e-07
    1087.66 | 1087.66 | 1.53887e+19 | 6833.97 | 3.90649e+08 | 2463 | 1.80053 | 0.494808 | 1.19501e-05 | 0.0148542 | 0.0551797 | 4.09395e-06

Plots
  pg1: PlotGroup3D "Mode Shape (solid)" | data = dset1
    surf1: Surface | expr = solid.disp
      def: Deform "Deformation" | expr = {u, v, w}; descr = Displacement field

Exports
  tbl1: Table | table = tbl1; filename = C:\Users\Philippe\Documents\FEA_Results\EigenfrequencyData.csv; ifexists = append

Methods
  datasetAnalysis: CodeEditor
    public class datasetAnalysis extends ApplicationMethod {
      String root_path, out_path;
      public void execute() {
        // Dataset range
        int start_idx = start_idx_default;
        int end_idx = end_idx_default;
        int beam_length = beam_length_default;
        // nr of eigenfrequencies to evaluate
        int nreigfreq = nr_ef_default;
        // set mesh size
        int mesh_size = mesh_size_default;
        debugLog("Mesh Size Set To: "+Integer.toString(mesh_size));
        // Check if data paths have been set
        if (dataset_path.equals("-1") || dataout_path.equals("-1")) {
          app.form("form1").formObject("DataAnalysisButton").setColor("background", 250, 0, 0);
          return;
        } else {
          app.form("form1").formObject("DataAnalysisButton").setColor("background", 0, 255, 0);
          this.root_path = dataset_path;
          this.out_path = dataout_path;
        }
        int[] applied_force = {0, 0, 0}; // N/A  for eigenfrequency
        // load/compute dummy datapoint
        InitLoadCAD(stepFileName);
        boundarySelection(beam_length, 45);
        AddParticipationFactors();
        ApplyMaterial();
        ApplyPhysics(applied_force[0], applied_force[1], applied_force[2]);
        AddStudy(nreigfreq);
        ComputeMesh(mesh_size);
        ComputeStudy();
        AnalyzeSolutions(-1, nreigfreq);
        SaveResults(this.out_path);
        // initialize progress bar bar
        startProgress(app.form("form1").formObject("progressbar1"));
        int percentage_progress = 0;
        for (int i = start_idx; i < end_idx; i++) {
          // update progress bar (percentage)
          percentage_progress = (int) (i/(float) (end_idx)*100);
          setProgressBar(app.form("form1").formObject("progressbar1"), percentage_progress, "processed datapoint "+Integer.toString(i));
          // process datapoint
          model.component("comp1").variable("var1").set("idx", i);
          LoadCAD(this.root_path+"/"+Integer.toString(i)+"/body.step");
          ReApplyPhysics();
          ComputeMesh(mesh_size);
          ComputeStudy();
          AnalyzeSolutions(i, nreigfreq);
          SaveResults(this.out_path);
          debugLog("Data Point "+Integer.toString(i)+" processed");
        }
      }
      public void LoadSTL(String stl_file) {
        /*
         * LoadSTL Code
         */
        String[] tags = model.component().tags();
        // Verify if model components exist already
        // if they don't they will be created
        if (!contains(tags, "comp1")) {
          debugLog("comp1 didn't exist, create comp1");
          model.component().create("comp1", true);
        }
        if (!contains(tags, "mcomp1")) {
          debugLog("mcomp1 didn't exist, create mcomp1");
          model.component().create("mcomp1", "MeshComponent");
        }
        if (contains(tags, "mcomp2")) {
          debugLog("mcomp2 will be removed");
          model.component().remove("mcomp2");
        }
        // Verify all geom() tags() are set &
        // create them if they are not set
        tags = model.component("comp1").geom().tags();
        //debugLog(tags);
        if (!contains(tags, "geom1")) {
          debugLog("geom1 didn't exist... create geom1");
          model.component("comp1").geom().create("geom1", 3);
        }
        tags = model.component("comp1").geom("geom1").feature().tags();
        //debugLog(tags);
        if (!contains(tags, "imp1")) {
          debugLog("imp1 didn't exist... create imp1");
          model.component("comp1").geom("geom1").create("imp1", "Import");
        }
        with(model.component("comp1").geom("geom1").feature("imp1"));
          set("filename", stl_file);
        endwith();
        // Verify all mesh() tags() are set &
        // create them if they are not set
        tags = model.component("comp1").mesh().tags();
        if (!contains(tags, "mesh1")) {
          debugLog("mesh1 didn't exist... create mesh1");
          model.component("comp1").mesh().create("mesh1");
        }
        // unnecessary label expendable line of code
        model.component("comp1").geom("geom1").feature("imp1").label("beamSTL");
        tags = model.geom().tags();
        //debugLog(tags);
        if (!contains(tags, "mgeom1")) {
          debugLog("mgeom1 didn't exist... create mgeom1");
          model.geom().create("mgeom1", 3);
        }
        tags = model.mesh().tags();
        if (!contains(tags, "mpart1")) {
          debugLog("mpart1 didn't exist... create mpart1");
          model.mesh().create("mpart1", "mgeom1");
        }
        with(model.component("comp1").geom("geom1").feature("imp1"));
          set("mesh", "mpart1");
        endwith();
        tags = model.mesh("mpart1").feature().tags();
        if (!contains(tags, "imp1")) {
          debugLog("imp1 didn't exist... create imp1");
          model.mesh("mpart1").create("imp1", "Import");
        }
        with(model.mesh("mpart1").feature("imp1"));
          set("filename", stl_file);
        endwith();
        with(model.component("comp1").geom("geom1").feature("imp1"));
          set("meshfilename", "");
        endwith();
        model.mesh("mpart1").run();
        model.component("comp1").geom("geom1").feature("imp1").importData();
        model.component("comp1").geom("geom1").run("imp1");
      }
      public void boundarySelection(int beam_length, int angletol) {
        model.component("comp1").geom("geom1").run("imp1");
        String[] tags = model.component("comp1").geom("geom1").feature().tags();
        if (!contains(tags, "boxsel1")) {
          debugLog("boxsel1 didn't exist... create boxsel1");
          model.component("comp1").geom("geom1").create("boxsel1", "BoxSelection");
          model.component("comp1").geom("geom1").feature("boxsel1").label("Bottom");
        }
        if (!contains(tags, "boxsel2")) {
          debugLog("boxsel2 didn't exist... create boxsel2");
          model.component("comp1").geom("geom1").create("boxsel2", "BoxSelection");
          model.component("comp1").geom("geom1").feature("boxsel2").label("Top");
        }
        // create Bottom
        with(model.component("comp1").geom("geom1").feature("boxsel1"));
          set("condition", "inside");
          set("zmin", Double.NEGATIVE_INFINITY);
          set("zmax", 1);
          set("entitydim", 2);
          set("groupcontang", true);
          set("angletol", angletol);
        endwith();
        model.component("comp1").geom("geom1").run("boxsel1");
        // create Top
        with(model.component("comp1").geom("geom1").feature("boxsel2"));
          set("condition", "inside");
          set("zmin", beam_length-1);
          set("zmax", Double.POSITIVE_INFINITY);
          set("entitydim", 2);
          set("groupcontang", true);
          set("angletol", angletol);
        endwith();
        model.component("comp1").geom("geom1").run("boxsel2");
        model.component("comp1").geom("geom1").runPre("fin");
      }
      public void AddParticipationFactors() {
        String[] tags = model.component("comp1").common().tags();
        if (!contains(tags, "mpf1"))
          model.component("comp1").common().create("mpf1", "ParticipationFactors");
      }
      public void ApplyMaterial() {
        String[] tags = model.component("comp1").material().tags();
        if (!contains(tags, "mat1")) {
          debugLog("mat1 didn't exist... create mat1");
          model.component("comp1").material().create("mat1", "Common");
        }
        model.component("comp1").material("mat1").label("Aluminum");
        with(model.component("comp1").material("mat1"));
          set("family", "aluminum");
        endwith();
        with(model.component("comp1").material("mat1").propertyGroup("def"));
          set("relpermeability", "1");
          set("heatcapacity", "900[J/(kg*K)]");
          set("thermalconductivity", "238[W/(m*K)]");
          set("electricconductivity", "3.774e7[S/m]");
          set("relpermittivity", "1");
          set("thermalexpansioncoefficient", "23e-6[1/K]");
          set("density", "2700[kg/m^3]");
        endwith();
        model.component("comp1").material("mat1").propertyGroup().create("Enu", "Young's modulus and Poisson's ratio");
        with(model.component("comp1").material("mat1").propertyGroup("Enu"));
          set("poissonsratio", "0.33");
          set("youngsmodulus", "70e9[Pa]");
        endwith();
        model.component("comp1").material("mat1").propertyGroup().create("Murnaghan", "Murnaghan");
        with(model.component("comp1").material("mat1").propertyGroup("Murnaghan"));
          set("n", "-3.5e11[Pa]");
          set("m", "-3.3e11[Pa]");
          set("l", "-2.5e11[Pa]");
        endwith();
        model.component("comp1").material("mat1").propertyGroup().create("Lame", "Lam\u00e9 parameters");
        with(model.component("comp1").material("mat1").propertyGroup("Lame"));
          set("muLame", "2.6e10[Pa]");
          set("lambLame", "5.1e10[Pa]");
        endwith();
        with(model.component("comp1").material("mat1"));
          set("family", "aluminum");
        endwith();
        model.component("comp1").geom("geom1").run();
        tags = model.component("comp1").view().tags();
        if (contains(tags, "view4")) {
          model.component("comp1").view("view4").set("showlabels", true);
        }
      }
      /*
       * Applies physical constraints to beam
       * param: x_load [N], y_load [N],z_load [N]
       */
      public void ApplyPhysics(int x_load, int y_load, int z_load) {
        String[] tags = model.component("comp1").physics().tags();
        if (!contains(tags, "solid")) {
          debugLog("solid doesn't exist... create solid");
          model.component("comp1").physics().create("solid", "SolidMechanics", "geom1");
        }
        tags = model.component("comp1").physics("solid").feature().tags();
        if (!contains(tags, "fix1")) {
          debugLog("fix1 doesn't exist... create fix1");
          model.component("comp1").physics("solid").create("fix1", "Fixed", 2);
        }
        //model.component("comp1").physics("solid").feature("fix1").selection().set(new int[]{3});
        model.component("comp1").physics("solid").feature("fix1").selection().named("geom1_boxsel1");
        /****** NO BOUNDARY LOAD NEEDED *********
        if (!contains(tags, "bndl1")) {
          debugLog("bndl1 doesn't exist... create bndl1");
          model.component("comp1").physics("solid").create("bndl1", "BoundaryLoad", 2);
        }
        model.component("comp1").physics("solid").feature("bndl1").selection().set(new int[]{4});
        with(model.component("comp1").physics("solid").feature("bndl1"));
          set("LoadType", "TotalForce");
          set("Ftot", new int[]{x_load, y_load, z_load});
        endwith();
        */
      }
      public void ComputeMesh(int auto_mesh_size) {
        /*
        The value 5 of <size> corresponds to the default size,
        the values 4, 3, 2, and 1 give you an increasingly finer mesh,
        whereas the values 6, 7, 8, and 9 give you a coarser mesh.
        */
        model.component("comp1").mesh("mesh1").automatic(true);
        model.component("comp1").mesh("mesh1").autoMeshSize(auto_mesh_size);
        model.component("comp1").mesh("mesh1").run();
      }
      public void AddStudy(int nreigfreq) {
        String[] tags = model.study().tags();
        if (!contains(tags, "std1")) {
          debugLog("std1 doesn't exist... create std1");
          model.study().create("std1");
        }
        tags = model.study("std1").feature().tags();
        if (!contains(tags, "eig")) {
          debugLog("stat didn't exist... create stat");
          model.study("std1").create("eig", "Eigenfrequency");
        }
        with(model.study("std1").feature("eig"));
          set("solnum", "auto");
          set("notsolnum", "auto");
          set("ngen", "5");
        endwith();
        model.study("std1").feature("eig").activate("solid", true);
        with(model.study("std1").feature("eig"));
          set("neigsactive", true);
          set("neigs", nreigfreq);
          set("shift", "100[Hz]");
          set("geometricNonlinearity", false);
          set("geomselection", "geom1");
          set("mesh", new String[]{"geom1", "mesh1"});
        endwith();
      }
      public void ComputeStudy() {
        String[] tags = model.sol().tags();
        if (!contains(tags, "sol1")) {
          debugLog("sol1 didn't exist... create sol1");
          model.sol().create("sol1");
        }
        model.sol("sol1").study("std1");
        with(model.study("std1").feature("eig"));
          set("notlistsolnum", 1);
          set("notsolnum", "auto");
          set("listsolnum", 1);
          set("solnum", "auto");
        endwith();
        tags = model.sol("sol1").feature().tags();
        if (!contains(tags, "st1")) {
          debugLog("st1 didn't exist... create st1");
          model.sol("sol1").create("st1", "StudyStep");
        }
        with(model.sol("sol1").feature("st1"));
          set("study", "std1");
          set("studystep", "eig");
        endwith();
        if (!contains(tags, "v1")) {
          debugLog("v1 didn't exist... create v1");
          model.sol("sol1").create("v1", "Variables");
        }
        with(model.sol("sol1").feature("v1"));
          set("control", "eig");
        endwith();
        if (contains(tags, "e1")) {
          debugLog("e1 already exist... remove e1");
          model.sol("sol1").feature().remove("e1");
        }
        model.sol("sol1").create("e1", "Eigenvalue");
        with(model.sol("sol1").feature("e1"));
          set("control", "eig");
        endwith();
        model.sol("sol1").attach("std1");
        // remove "pg1" if it already exists
        // (maybe significalty slower than keeping the previous)
        tags = model.result().tags();
        if (contains(tags, "pg1")) {
          debugLog("pg1 already exists.. remove pg1");
          model.result().remove("pg1");
        }
        model.result().create("pg1", "PlotGroup3D");
        with(model.result("pg1"));
          set("data", "dset1");
          set("showlegends", false);
        endwith();
        model.result("pg1").create("surf1", "Surface");
        with(model.result("pg1").feature("surf1"));
          set("expr", new String[]{"solid.disp"});
        endwith();
        model.result("pg1").label("Mode Shape (solid)");
        with(model.result("pg1").feature("surf1"));
          set("colortable", "AuroraBorealis");
        endwith();
        model.result("pg1").feature("surf1").create("def", "Deform");
        with(model.result("pg1").feature("surf1").feature("def"));
          set("expr", new String[]{"u", "v", "w"});
          set("descr", "Displacement field");
        endwith();
        model.sol("sol1").runAll();
        model.result("pg1").run();
      }
      public void AnalyzeSolutions(int idx, int nreigfreq) {
        String[] addedCols = {"idx"};
        double[][] addedVals = new double[nreigfreq][1];
        for (int i = 0; i < nreigfreq; i++) {
          addedVals[i][0] = idx;
          debugLog(addedVals);
        }
        String[] tags = model.result().numerical().tags();
        // verify max1 existence
        if (!contains(tags, "gev1")) {
          debugLog("gev1 didn't exist... create gev1");
          model.result().numerical().create("gev1", "EvalGlobal");
        }
        with(model.result().numerical("gev1"));
          set("allowdescrupdate", true);
          set("expr", new String[]{"solid.freq", "solid.Q_eig", "solid.omega", "solid.Wh_tot", "numberofdofs", "mpf1.mEffLX", "mpf1.mEffLY", "mpf1.mEffLZ", "mpf1.mEffRX", "mpf1.mEffRY",
                                   "mpf1.mEffRZ", "mpf1.pfLnormX", "mpf1.pfLnormY", "mpf1.pfLnormZ", "mpf1.pfRnormX", "mpf1.pfRnormY", "mpf1.pfRnormZ"});
          set("descr", new String[]{"Frequency", "Quality factor for eigenvalue", "Angular frequency", "Total stored energy", "Number of degrees of freedom", "Effective modal mass, X-translation",
                                    "Effective modal mass, Y-translation", "Effective modal mass, Z-translation", "Effective modal mass, X-rotation", "Effective modal mass, Y-rotation",
                                    "Effective modal mass, Z-rotation", "Participation factor, normalized, X-translation", "Participation factor, normalized, Y-translation", "Participation factor, normalized, Z-translation",
                                    "Participation factor, normalized, X-rotation", "Participation factor, normalized, Y-rotation", "Participation factor, normalized, Z-rotation"});
          set("allowdescrupdate", false);
        endwith();
        tags = model.result().table().tags();
        // verify tbl1 existence
        if (!contains(tags, "tbl1")) {
          debugLog("tbl1 didn't exist... create tbl1");
          model.result().table().create("tbl1", "Table");
        }
        model.result().table("tbl1")
          .comments("Global Evaluation 1 {gev1} (solid.freq, solid.Q_eig, solid.omega, solid.Wh_tot, numberofdofs, mpf1.mEffLX, mpf1.mEffLY, mpf1.mEffLZ, mpf1.mEffRX, mpf1.mEffRY, mpf1.mEffRZ, mpf1.pfLnormX, mpf1.pfLnormY, mpf1.pfLnormZ, mpf1.pfRnormX, mpf1.pfRnormY, mpf1.pfRnormZ, idx)");
        with(model.result().numerical("gev1"));
          set("table", "tbl1");
        endwith();
        model.result().numerical("gev1").setResult();
        // add index
        model.result().table("tbl1").addColumns(addedCols, addedVals);
        debugLog(model.result().table("tbl1").getTableData(false));
      }
      public void SaveResults(String csv_folder_path) {
        String[] tags = model.result().export().tags();
        if (!contains(tags, "tbl1")) {
          debugLog("tbl1 didn't exist... create tbl1");
          model.result().export().create("tbl1", "tbl1", "Table");
        }
        // export data without header and append to file
        with(model.result().export("tbl1"));
          set("filename", csv_folder_path+"/EigenfrequencyData.csv");
          set("ifexists", "append");
          set("header", false);
          //set("ifexists", "overwrite");
        endwith();
        model.result().export("tbl1").run();
        // clear table contents after storing data
        model.result().table("tbl1").clearTableData();
      }
      public void InitLoadCAD(String current_cad) {
        String[] tags = model.component().tags();
        if (!contains(tags, "comp1")) {
          debugLog("comp1 didn't exist, create comp1");
          model.component().create("comp1", true);
        }
        tags = model.component("comp1").geom().tags();
        if (!contains(tags, "geom1")) {
          debugLog("geom1 didn't exist... create geom1");
          model.component("comp1").geom().create("geom1", 3);
        }
        tags = model.component("comp1").mesh().tags();
        if (!contains(tags, "mesh1")) {
          debugLog("mesh1 didn't exist... create mesh1");
          model.component("comp1").mesh().create("mesh1");
        }
        LoadCAD(current_cad);
      }
      public void LoadCAD(String current_cad) {
        model.component("comp1").geom("geom1").lengthUnit("mm");
        model.component("comp1").geom("geom1").geomRep("cadps");
        String[] tags = model.component("comp1").geom("geom1").feature().tags();
        if (!contains(tags, "imp1")) {
          debugLog("imp1 didn't exist... create imp1");
          model.component("comp1").geom("geom1").create("imp1", "Import");
        }
        with(model.component("comp1").geom("geom1").feature("imp1"));
          set("type", "cad");
          set("filename", current_cad);
          set("fillholes", true);
          set("selresult", true);
          set("selresultshow", "bnd");
          set("keepsolid", true);
          set("keepbnd", true);
          set("fillholes", true);
          set("check", true);
          set("repair", true);
          set("removeredundant", true);
          set("selresult", true);
          set("keepfree", false);
        endwith();
        boolean cadNotLoaded = true;
        while (cadNotLoaded) {
          try {
            model.component("comp1").geom("geom1").feature("imp1").importData();
            model.component("comp1").geom("geom1").run("imp1");
            cadNotLoaded = false;
          } catch (Throwable t) {
            debugLog(String.format("Error caught: %s", t.toString()));
            pause(10);
          }
        }
      }
      public static void pause(int sec) {
        try {
          Thread.sleep(sec*1000);
        } catch (InterruptedException e) {
          System.err.format("IOException: %s%n", e);
        }
      }
      public void ReApplyPhysics() {
        model.component("comp1").geom("geom1").run();
        model.component("comp1").geom("geom1").run("boxsel1");
        model.component("comp1").geom("geom1").run("boxsel2");
        //model.component("comp1").physics("solid").feature("fix1").selection().set(new int[]{3});
        model.component("comp1").physics("solid").feature("fix1").selection().named("geom1_boxsel1");
        //model.component("comp1").physics("solid").feature("bndl1").selection().set(new int[]{4});
      }
    }
  import_stl: CodeEditor
    public class import_stl extends ApplicationMethod {
      public void execute() {
        model.component().create("comp1", true);
        model.component("comp1").geom().create("geom1", 3);
        model.component("comp1").mesh().create("mesh1");
        model.component("comp1").geom("geom1").lengthUnit("mm");
        model.component("comp1").geom("geom1").create("imp1", "Import");
        with(model.component("comp1").geom("geom1").feature("imp1"));
          set("filename", "C:/Users/Ron/Documents/Columbia/Altair/STL_Examples/beam_test.STL");
          set("selresult", true); // selection of resulting entities
          set("selresultshow", "all");
          set("selresult", false);
        endwith();
        model.component().create("mcomp1", "MeshComponent");
        model.geom().create("mgeom1", 3);
        model.geom("mgeom1").lengthUnit("mm");
        model.mesh().create("mpart1", "mgeom1");
        with(model.component("comp1").geom("geom1").feature("imp1"));
          set("mesh", "mpart1");
        endwith();
        model.mesh("mpart1").create("imp1", "Import");
        with(model.mesh("mpart1").feature("imp1"));
          set("filename", "C:/Users/Ron/Documents/Columbia/Altair/STL_Examples/beam_test.STL");
        endwith();
        with(model.component("comp1").geom("geom1").feature("imp1"));
          set("meshfilename", "");
        endwith();
        model.mesh("mpart1").run();
        model.component("comp1").geom("geom1").runPre("fin");
      }
    }
  apply_physics: CodeEditor
    public class apply_physics extends ApplicationMethod {
      public void execute() {
        model.component("comp1").physics().create("solid", "SolidMechanics", "geom1");
        model.component("comp1").geom("geom1").run();
        model.component("comp1").physics("solid").create("fix1", "Fixed", 2);
        model.component("comp1").physics("solid").feature("fix1").selection().set(new int[]{3});
      }
    }
  addEigenfrequencyStudy: CodeEditor
    public class addEigenfrequencyStudy extends ApplicationMethod {
      public void execute() {
        model.study().create("std1");
        model.study("std1").create("eig", "Eigenfrequency");
        with(model.study("std1").feature("eig"));
          set("solnum", "auto");
          set("notsolnum", "auto");
          set("ngen", "5");
        endwith();
        model.study("std1").feature("eig").activate("solid", true);
        with(model.study("std1").feature("eig"));
          set("neigsactive", true);
          set("neigs", 10);
          set("geometricNonlinearity", true);
          set("geometricNonlinearity", false);
          set("usestoresel", "selection");
          set("usestoresel", "all");
          set("errestandadap", "adaption");
        endwith();
      }
    }
  addMaterial: CodeEditor
    public class addMaterial extends ApplicationMethod {
      public void execute() {
        model.component("comp1").material().create("mat2", "Common");
        model.component("comp1").material("mat2").label("Aluminum");
        with(model.component("comp1").material("mat2"));
          set("family", "aluminum");
        endwith();
        with(model.component("comp1").material("mat2").propertyGroup("def"));
          set("relpermeability", "1");
          set("heatcapacity", "900[J/(kg*K)]");
          set("thermalconductivity", "238[W/(m*K)]");
          set("electricconductivity", "3.774e7[S/m]");
          set("relpermittivity", "1");
          set("thermalexpansioncoefficient", "23e-6[1/K]");
          set("density", "2700[kg/m^3]");
        endwith();
        model.component("comp1").material("mat2").propertyGroup().create("Enu", "Young's modulus and Poisson's ratio");
        with(model.component("comp1").material("mat2").propertyGroup("Enu"));
          set("poissonsratio", "0.33");
          set("youngsmodulus", "70e9[Pa]");
        endwith();
        model.component("comp1").material("mat2").propertyGroup().create("Murnaghan", "Murnaghan");
        with(model.component("comp1").material("mat2").propertyGroup("Murnaghan"));
          set("n", "-3.5e11[Pa]");
          set("m", "-3.3e11[Pa]");
          set("l", "-2.5e11[Pa]");
        endwith();
        model.component("comp1").material("mat2").propertyGroup().create("Lame", "Lam\u00e9 parameters");
        with(model.component("comp1").material("mat2").propertyGroup("Lame"));
          set("muLame", "2.6e10[Pa]");
          set("lambLame", "5.1e10[Pa]");
        endwith();
        with(model.component("comp1").material("mat2"));
          set("family", "aluminum");
        endwith();
      }
    }
  computeStudy: CodeEditor
    public class computeStudy extends ApplicationMethod {
      public void execute() {
        model.sol("sol1").study("std1");
        with(model.study("std1").feature("eig"));
          set("notlistsolnum", 1);
          set("notsolnum", "auto");
          set("listsolnum", 1);
          set("solnum", "auto");
        endwith();
        model.sol("sol1").feature().remove("e1");
        model.sol("sol1").feature().remove("v1");
        model.sol("sol1").feature().remove("st1");
        model.sol("sol1").create("st1", "StudyStep");
        with(model.sol("sol1").feature("st1"));
          set("study", "std1");
          set("studystep", "eig");
        endwith();
        model.sol("sol1").create("v1", "Variables");
        with(model.sol("sol1").feature("v1"));
          set("control", "eig");
        endwith();
        model.sol("sol1").create("e1", "Eigenvalue");
        with(model.sol("sol1").feature("e1"));
          set("control", "eig");
        endwith();
        model.sol("sol1").attach("std1");
        model.result().create("pg1", "PlotGroup3D");
        with(model.result("pg1"));
          set("data", "dset2");
          set("showlegends", false);
        endwith();
        model.result("pg1").create("surf1", "Surface");
        with(model.result("pg1").feature("surf1"));
          set("expr", new String[]{"solid.disp"});
        endwith();
        model.result("pg1").label("Mode Shape (solid)");
        with(model.result("pg1").feature("surf1"));
          set("colortable", "AuroraBorealis");
        endwith();
        model.result("pg1").feature("surf1").create("def", "Deform");
        with(model.result("pg1").feature("surf1").feature("def"));
          set("expr", new String[]{"u", "v", "w"});
          set("descr", "Displacement field");
        endwith();
        model.sol("sol1").runAll();
        model.result("pg1").run();
        with(model.result("pg1"));
          set("data", "dset6");
        endwith();
        model.result("pg1").run();
        with(model.result("pg1"));
          set("looplevel", new int[]{10});
        endwith();
        model.result("pg1").run();
        with(model.result("pg1"));
          set("data", "dset2");
        endwith();
        model.result("pg1").run();
        with(model.result("pg1"));
          set("data", "dset6");
        endwith();
        model.result("pg1").run();
        with(model.result("pg1"));
          set("data", "dset5");
        endwith();
        model.result("pg1").run();
        with(model.result("pg1"));
          set("data", "dset4");
        endwith();
        model.result("pg1").run();
        with(model.result("pg1"));
          set("data", "dset3");
        endwith();
        model.result("pg1").run();
        with(model.result("pg1"));
          set("data", "dset2");
        endwith();
        model.result("pg1").run();
        model.result("pg1").run();
      }
    }
  new_addStudy: CodeEditor
    public class new_addStudy extends ApplicationMethod {
      public void execute() {
        model.study().create("std1");
        model.study("std1").create("eig", "Eigenfrequency");
        with(model.study("std1").feature("eig"));
          set("solnum", "auto");
          set("notsolnum", "auto");
          set("ngen", "5");
        endwith();
        model.study("std1").feature("eig").activate("solid", true);
        with(model.study("std1").feature("eig"));
          set("neigsactive", true);
          set("neigs", 3);
          set("shift", "100[Hz]");
          set("geometricNonlinearity", true);
          set("geometricNonlinearity", false);
          set("geomselection", "geom1");
          set("mesh", new String[]{"geom1", "nomesh"});
          set("geomselection", "geom1");
          set("mesh", new String[]{"geom1", "mesh1"});
        endwith();
      }
    }
  new_computeStudy: CodeEditor
    public class new_computeStudy extends ApplicationMethod {
      public void execute() {
        model.sol().create("sol1");
        model.sol("sol1").study("std1");
        with(model.study("std1").feature("eig"));
          set("notlistsolnum", 1);
          set("notsolnum", "auto");
          set("listsolnum", 1);
          set("solnum", "auto");
        endwith();
        model.sol("sol1").create("st1", "StudyStep");
        with(model.sol("sol1").feature("st1"));
          set("study", "std1");
          set("studystep", "eig");
        endwith();
        model.sol("sol1").create("v1", "Variables");
        with(model.sol("sol1").feature("v1"));
          set("control", "eig");
        endwith();
        model.sol("sol1").create("e1", "Eigenvalue");
        with(model.sol("sol1").feature("e1"));
          set("control", "eig");
        endwith();
        model.sol("sol1").attach("std1");
        model.result().create("pg1", "PlotGroup3D");
        with(model.result("pg1"));
          set("data", "dset1");
          set("showlegends", false);
        endwith();
        model.result("pg1").create("surf1", "Surface");
        with(model.result("pg1").feature("surf1"));
          set("expr", new String[]{"solid.disp"});
        endwith();
        model.result("pg1").label("Mode Shape (solid)");
        with(model.result("pg1").feature("surf1"));
          set("colortable", "AuroraBorealis");
        endwith();
        model.result("pg1").feature("surf1").create("def", "Deform");
        with(model.result("pg1").feature("surf1").feature("def"));
          set("expr", new String[]{"u", "v", "w"});
          set("descr", "Displacement field");
        endwith();
        model.sol("sol1").runAll();
        model.result("pg1").run();
      }
    }
  new_AnalayzeResults: CodeEditor
    public class new_AnalayzeResults extends ApplicationMethod {
      public void execute() {
        model.result().numerical().create("gev1", "EvalGlobal");
        with(model.result().numerical("gev1"));
          set("allowdescrupdate", true);
          set("expr", new String[]{"solid.freq", "lambda", "solid.Q_eig", "solid.omega", "solid.Wh_tot", "numberofdofs"});
          set("descr", new String[]{"Frequency", "Eigenvalue", "Quality factor for eigenvalue", "Angular frequency", "Total stored energy", "Number of degrees of freedom"});
          set("allowdescrupdate", false);
        endwith();
        //model.result().table().remove("tbl1");
        model.result().table().create("tbl1", "Table");
        model.result().table("tbl1")
          .comments("Global Evaluation 1 {gev1} (solid.freq, lambda, solid.Q_eig, solid.omega, solid.Wh_tot, numberofdofs)");
        with(model.result().numerical("gev1"));
          set("table", "tbl1");
        endwith();
        model.result().numerical("gev1").setResult();
        // Save Results
        model.result().export().create("tbl1", "tbl1", "Table");
        with(model.result().export("tbl1"));
          set("filename", "C:\\Users\\Ron\\Documents\\Columbia\\Altair\\EigenfrequencyData.csv");
          set("header", false);
          set("ifexists", "append");
        endwith();
        model.result().export("tbl1").run();
      }
    }
  addParticipationFactors: CodeEditor
    public class addParticipationFactors extends ApplicationMethod {
      public void execute() {
        model.component("comp1").common().create("mpf1", "ParticipationFactors");
      }
    }
  addMPF_GloabLEvaluation: CodeEditor
    public class addMPF_GloabLEvaluation extends ApplicationMethod {
      public void execute() {
        with(model.result().numerical("gev1"));
          set("expr", new String[]{"solid.freq", "solid.Q_eig", "solid.omega", "solid.Wh_tot", "numberofdofs", "mpf1.pfLX"});
          set("descr", new String[]{"Frequency", "Quality factor for eigenvalue", "Angular frequency", "Total stored energy", "Number of degrees of freedom", "Participation factor, X-translation"});
          setIndex("expr", "mpf1.pfLY", 6);
          setIndex("expr", "mpf1.pfLR", 7);
          setIndex("expr", "mpf1.pfLZ", 7);
          set("expr", new String[]{"solid.freq", "solid.Q_eig", "solid.omega", "solid.Wh_tot", "numberofdofs", "mpf1.pfLX", "mpf1.pfLY", "mpf1.pfLZ", "mpf1.mEffLX"});
          set("descr", new String[]{"Frequency", "Quality factor for eigenvalue", "Angular frequency", "Total stored energy", "Number of degrees of freedom", "Participation factor, X-translation", "Participation factor, Y-translation", "Participation factor, Z-translation", "Effective modal mass, X-translation"});
          setIndex("expr", "mpf1.mEffLY", 9);
          setIndex("expr", "mpf1.mEffLZ", 10);
          setIndex("expr", "mpf1.mEffRX", 11);
          setIndex("expr", "mpf1.mEffRY", 12);
          setIndex("expr", "mpf1.mEffRZ", 13);
        endwith();
        model.result().numerical("gev1").remove("unit", new int[]{5, 6, 7});
        model.result().numerical("gev1").remove("descr", new int[]{5, 6, 7});
        model.result().numerical("gev1").remove("expr", new int[]{5, 6, 7});
        with(model.result().numerical("gev1"));
          set("table", "tbl1");
        endwith();
        model.result().numerical("gev1").setResult();
        with(model.result().numerical("gev1"));
          set("expr", new String[]{"solid.freq", "solid.Q_eig", "solid.omega", "solid.Wh_tot", "numberofdofs", "mpf1.mEffLX", "mpf1.mEffLY", "mpf1.mEffLZ", "mpf1.mEffRX", "mpf1.mEffRY",
                                   "mpf1.mEffRZ", "mpf1.pfLnormX"});
          set("descr", new String[]{"Frequency", "Quality factor for eigenvalue", "Angular frequency", "Total stored energy", "Number of degrees of freedom", "Effective modal mass, X-translation", "Effective modal mass, Y-translation", "Effective modal mass, Z-translation", "Effective modal mass, X-rotation", "Effective modal mass, Y-rotation",
                                    "Effective modal mass, Z-rotation", "Participation factor, normalized, X-translation"});
          setIndex("expr", "mpf1.pfLnormY", 12);
          setIndex("expr", "mpf1.pfLnormZ", 13);
          setIndex("expr", "mpf1.pfRnormX", 14);
          setIndex("expr", "mpf1.pfRnormY", 15);
          setIndex("expr", "mpf1.pfRnormZ", 16);
        endwith();
        with(model.result().export("tbl1"));
          set("filename", "C:\\Users\\Philippe\\Documents\\FEA_Results\\EigenfrequencyData.csv");
        endwith();
        model.result().export("tbl1").run();
        model.result().numerical("gev1").remove("unit", 16);
        model.result().numerical("gev1").remove("descr", 16);
        model.result().numerical("gev1").remove("expr", new int[]{16});
        with(model.result().numerical("gev1"));
        endwith();
        with(model.result().numerical("gev1"));
          set("expr", new String[]{"solid.freq", "solid.Q_eig", "solid.omega", "solid.Wh_tot", "numberofdofs", "mpf1.mEffLX", "mpf1.mEffLY", "mpf1.mEffLZ", "mpf1.mEffRX", "mpf1.mEffRY",
                                   "mpf1.mEffRZ", "mpf1.pfLnormX", "mpf1.pfLnormY", "mpf1.pfLnormZ", "mpf1.pfRnormX", "mpf1.pfRnormY", "mpf1.pfRnormZ"});
          set("descr", new String[]{"Frequency", "Quality factor for eigenvalue", "Angular frequency", "Total stored energy", "Number of degrees of freedom", "Effective modal mass, X-translation", "Effective modal mass, Y-translation", "Effective modal mass, Z-translation", "Effective modal mass, X-rotation", "Effective modal mass, Y-rotation",
                                    "Effective modal mass, Z-rotation", "Participation factor, normalized, X-translation", "Participation factor, normalized, Y-translation", "Participation factor, normalized, Z-translation", "Participation factor, normalized, X-rotation", "Participation factor, normalized, Y-rotation", "Participation factor, normalized, Z-rotation"});
        endwith();
      }
    }
  meshing_settings: CodeEditor
    public class meshing_settings extends ApplicationMethod {
      public void execute() {
        model.component("comp1").mesh("mesh1").autoMeshSize(3);
        model.component("comp1").mesh("mesh1").automatic(false);
        model.component("comp1").mesh("mesh1").automatic(true);
        model.component("comp1").mesh("mesh1").run();
      }
    }